*Heading
** Job name: Job-frame99-7500 Model name: Model-frame99
** Generated by: Abaqus/CAE 2021
*Preprint, echo=NO, model=NO, history=NO, contact=NO
**
** PARTS
**
*Part, name=Part-1
*Node
      1,          15.,          27.
      2,          15.,          24.
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*Element, type=B21
 1,   1, 101
 2, 101, 102
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*Nset, nset=beam-all
    1,    2,    3,    4,    5,    6
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*Elset, elset=beam-all
  136,  137,  138,  139,  140,  141
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*Nset, nset=col-all
    1,    2,    3,    4,    5,    6
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*Elset, elset=col-all
    1,    2,    3,    4,    5,    6
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*Nset, nset=all, generate
    1,  2494,     1
*Elset, elset=all, generate
    1,  2565,     1
*Nset, nset=col-1
    9,   10,   27,   28,   70,   71
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*Elset, elset=col-1
  121,  122,  123,  124,  125,  126
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*Nset, nset=col-2
    8,    9,   26,   27,   62,   63
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*Elset, elset=col-2
  106,  107,  108,  109,  110,  111
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*Nset, nset=col-3
    7,    8,   25,   26,   57,   58
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*Elset, elset=col-3
   91,   92,   93,   94,   95,   96
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*Nset, nset=col-4
    6,    7,   24,   25,   43,   44
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*Elset, elset=col-4
   76,   77,   78,   79,   80,   81
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*Nset, nset=col-5
    5,    6,   23,   24,   42,   43
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*Elset, elset=col-5
   61,   62,   63,   64,   65,   66
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*Nset, nset=col-6
    4,    5,   22,   23,   34,   35
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*Elset, elset=col-6
   46,   47,   48,   49,   50,   51
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*Nset, nset=col-7
    3,    4,   21,   22,   29,   30
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*Elset, elset=col-7
   31,   32,   33,   34,   35,   36
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*Nset, nset=col-8
    2,    3,   16,   17,   18,   20
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*Elset, elset=col-8
   16,   17,   18,   19,   20,   21
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*Nset, nset=col-9
    1,    2,   11,   12,   13,   14
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*Elset, elset=col-9
    1,    2,    3,    4,    5,    6
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*Nset, nset=beam-1
    9,   27,   70,   71,   72,   73
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*Elset, elset=beam-1
 1186, 1187, 1188, 1189, 1190, 1191
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*Nset, nset=beam-2
    8,   26,   62,   63,   64,   65
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*Elset, elset=beam-2, generate
 1036,  1170,     1
*Nset, nset=beam-3
    7,   25,   57,   58,   59,   60
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*Elset, elset=beam-3
  946,  947,  948,  949,  950,  951
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*Elset, elset=beam-4
 691, 692, 693, 694, 695, 696
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*Nset, nset=beam-5
    5,   23,   42,   45,   46,   47
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*Elset, elset=beam-5
  721,  722,  723,  724,  725,  726
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*Nset, nset=beam-6
   4,  22,  34,  35,  36,  37
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*Elset, elset=beam-6, generate
 526,  660,    1
*Nset, nset=beam-7
    3,   21,   29,   30,   31,   32
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*Elset, elset=beam-7
  436,  437,  438,  439,  440,  441
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*Nset, nset=beam-8
    2,   16,   17,   18,   20,   75
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*Elset, elset=beam-8
  226,  227,  228,  229,  230,  231
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*Nset, nset=beam-9
    1,   11,   12,   13,   14,   15
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*Elset, elset=beam-9
  136,  137,  138,  139,  140,  141
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** Section: col-9  Profile: col
*Beam Section, elset=col-9, material=c40-9, temperature=GRADIENTS, section=RECT
1., 1.
0.,0.,-1.
** Section: col-8  Profile: col
*Beam Section, elset=col-8, material=c40-8, temperature=GRADIENTS, section=RECT
1., 1.
0.,0.,-1.
** Section: col-7  Profile: col
*Beam Section, elset=col-7, material=c40-7, temperature=GRADIENTS, section=RECT
1., 1.
0.,0.,-1.
** Section: col-6  Profile: col
*Beam Section, elset=col-6, material=c40-6, temperature=GRADIENTS, section=RECT
1., 1.
0.,0.,-1.
** Section: col-5  Profile: col
*Beam Section, elset=col-5, material=c40-5, temperature=GRADIENTS, section=RECT
1., 1.
0.,0.,-1.
** Section: col-4  Profile: col
*Beam Section, elset=col-4, material=c40-4, temperature=GRADIENTS, section=RECT
1., 1.
0.,0.,-1.
** Section: col-3  Profile: col
*Beam Section, elset=col-3, material=c40-3, temperature=GRADIENTS, section=RECT
1., 1.
0.,0.,-1.
** Section: col-2  Profile: col
*Beam Section, elset=col-2, material=c40-2, temperature=GRADIENTS, section=RECT
1., 1.
0.,0.,-1.
** Section: col-1  Profile: col
*Beam Section, elset=col-1, material=c40-1, temperature=GRADIENTS, section=RECT
1., 1.
0.,0.,-1.
** Section: beam-9  Profile: beam
*Beam Section, elset=beam-9, material=c40-9, temperature=GRADIENTS, section=RECT
0.6, 0.8
0.,0.,-1.
** Section: beam-8  Profile: beam
*Beam Section, elset=beam-8, material=c40-8, temperature=GRADIENTS, section=RECT
0.6, 0.8
0.,0.,-1.
** Section: beam-7  Profile: beam
*Beam Section, elset=beam-7, material=c40-7, temperature=GRADIENTS, section=RECT
0.6, 0.8
0.,0.,-1.
** Section: beam-6  Profile: beam
*Beam Section, elset=beam-6, material=c40-6, temperature=GRADIENTS, section=RECT
0.6, 0.8
0.,0.,-1.
** Section: beam-4  Profile: beam
*Beam Section, elset=beam-4, material=c40-4, temperature=GRADIENTS, section=RECT
0.6, 0.8
0.,0.,-1.
** Section: beam-5  Profile: beam
*Beam Section, elset=beam-5, material=c40-5, temperature=GRADIENTS, section=RECT
0.6, 0.8
0.,0.,-1.
** Section: beam-3  Profile: beam
*Beam Section, elset=beam-3, material=c40-3, temperature=GRADIENTS, section=RECT
0.6, 0.8
0.,0.,-1.
** Section: beam-2  Profile: beam
*Beam Section, elset=beam-2, material=c40-2, temperature=GRADIENTS, section=RECT
0.6, 0.8
0.,0.,-1.
** Section: beam-1  Profile: beam
*Beam Section, elset=beam-1, material=c40-1, temperature=GRADIENTS, section=RECT
0.6, 0.8
0.,0.,-1.
*End Part
**
**
** ASSEMBLY
**
*Assembly, name=Assembly
**
*Instance, name=Part-1-1, part=Part-1
*End Instance
**
*Nset, nset=Set-1, instance=Part-1-1
  10,  28,  89,  90,  93,  96,  97,  98,  99, 100
*Nset, nset=Set-2, instance=Part-1-1
   41,   42,   43,   69,   70,   85
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*Elset, elset=Set-2, instance=Part-1-1
  661,  662,  663,  664,  665,  666
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*End Assembly
**
** MATERIALS
**
**<MATERIALS_BEGIN>
*Material, name=c40-1
*Density
2500.,
*Elastic
 3.25e+10, 0.2
*Material, name=c40-2
*Density
2500.,
*Elastic
 3.25e+10, 0.2
*Material, name=c40-3
*Density
2500.,
*Elastic
 3.25e+10, 0.2
*Material, name=c40-4
*Density
2500.,
*Elastic
 3.25e+10, 0.2
*Material, name=c40-5
*Density
2500.,
*Elastic
 3.25e+10, 0.2
*Material, name=c40-6
*Density
2500.,
*Elastic
 3.25e+10, 0.2
*Material, name=c40-7
*Density
2500.,
*Elastic
 3.25e+10, 0.2
*Material, name=c40-8
*Density
2500.,
*Elastic
 3.25e+10, 0.2
*Material, name=c40-9
*Density
2500.,
*Elastic
 3.25e+10, 0.2
**<MATERIALS_END>
*Material, name=steel-1
*Density
7850.,
*Elastic
 2.03e+11, 0.3
*Material, name=steel-2
*Density
7850.,
*Elastic
 2.03e+11, 0.3
*Material, name=steel-3
*Density
7850.,
*Elastic
 2.03e+11, 0.3
*Material, name=steel-4
*Density
7850.,
*Elastic
 2.03e+11, 0.3
*Material, name=steel-5
*Density
7850.,
*Elastic
 2.03e+11, 0.3
*Material, name=steel-6
*Density
7850.,
*Elastic
 2.03e+11, 0.3
*Material, name=steel-7
*Density
7850.,
*Elastic
 2.03e+11, 0.3
*Material, name=steel-8
*Density
7850.,
*Elastic
 2.03e+11, 0.3
*Material, name=steel-9
*Density
7850.,
*Elastic
 2.03e+11, 0.3
** ----------------------------------------------------------------
*PREPRINT, MODEL=YES, ECHO=YES, HISTORY=NO
**
** STEP: Step-1
**
*Step, name=Step-1, nlgeom=NO
*Static
1., 1., 1e-05, 1.
**
** BOUNDARY CONDITIONS
**
** Name: BC-1 Type: 对称/反对称/完全固定
*Boundary
Set-1, ENCASTRE
**
** LOADS
**
** Name: Load-1   Type: Line load
*Dload
Set-2, PX, 300000.
**
** OUTPUT REQUESTS
**
*Restart, write, frequency=0
**
** FIELD OUTPUT: F-Output-1
**
*Output, field, variable=PRESELECT
**
** HISTORY OUTPUT: H-Output-1
**
*Output, history, variable=PRESELECT
*End Step

*STEP, NAME=MATRIX
*MATRIX GENERATE, STIFFNESS, LOAD
*MATRIX OUTPUT, STIFFNESS,LOAD, FORMAT=MATRIX
*Boundary
Set-1, ENCASTRE
*LOAD CASE, NAME=LC1
*Dload
Set-2, PX, 300000.
*END LOAD CASE
*END STEP
