*Heading
** Job name: Job-station-1w Model name: Model-sation
** Generated by: Abaqus/CAE 2021
*Preprint, echo=NO, model=NO, history=NO, contact=NO
**
** PARTS
**
*Part, name=site
*Node
      1,   85.5999985,          41.
      2,   85.5999985,         38.5
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*Element, type=CPE4
  1,    1,   41, 1341,  148
  2,   41,    2,   42, 1341
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*Nset, nset=site-1
    1,    2,    3,    4,    5,    6
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*Elset, elset=site-1
    1,    2,    3,    4,    5,    6
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*Nset, nset=site-2
    2,    3,    6,    7,    8,    9
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*Elset, elset=site-2
  145,  146,  147,  148,  149,  150
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*Nset, nset=site-3
   30,   31,   35,   36,   37,   38
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*Elset, elset=site-3, generate
 2863,  3510,     1
*Nset, nset=site-4
   26,   27,   28,   29,   37,   38
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*Elset, elset=site-4, generate
 3511,  3834,     1
*Nset, nset=site-5
   22,   23,   24,   25,   26,   27
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*Elset, elset=site-5
 2485, 2486, 2487, 2488, 2489, 2490
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*Nset, nset=site-6
   18,   19,   20,   21,   22,   23
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*Elset, elset=site-6
 2269, 2270, 2271, 2272, 2273, 2274
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*Nset, nset=site-7
   10,   13,   15,   16,   18,   19
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*Elset, elset=site-7
 1513, 1514, 1515, 1516, 1517, 1518
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*Nset, nset=site-8
   10,   11,   12,   13,   14,   15
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*Elset, elset=site-8
  217,  218,  219,  220,  221,  222
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** Section: Section-1
*Solid Section, elset=site-1, material=soil-1
1.,
** Section: Section-2
*Solid Section, elset=site-2, material=soil-2
1.,
** Section: Section-8
*Solid Section, elset=site-8, material=soil-8
1.,
** Section: Section-7
*Solid Section, elset=site-7, material=soil-7
1.,
** Section: Section-6
*Solid Section, elset=site-6, material=soil-6
1.,
** Section: Section-5
*Solid Section, elset=site-5, material=soil-5
1.,
** Section: Section-3
*Solid Section, elset=site-3, material=soil-3
1.,
** Section: Section-4
*Solid Section, elset=site-4, material=soil-4
1.,
*End Part
**
*Part, name=struc
*Node
      1,   12.8999996,           0.
      2,   12.8999996,   7.06500006
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*Element, type=B21
 1,  1, 13
 2, 13, 14
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*Nset, nset=top-p
   3,   4,  10,  12,  73,  74
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*Elset, elset=top-p
  63,  64,  65,  66,  67,  68
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*Nset, nset=bot-p
   1,   7,   8,   9, 196, 197
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*Elset, elset=bot-p
 190, 191, 192, 193, 194, 195
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*Nset, nset=side-p-L
   6,   7,  12, 162, 163, 164
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*Elset, elset=side-p-L
 155, 156, 157, 158, 159, 160
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*Nset, nset=side-p-R
   9,  10,  11, 395, 396, 397
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*Elset, elset=side-p-R, generate
 395,  456,    1
*Nset, nset=col-L
   4,   5,   8,  95,  96,  97
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*Elset, elset=col-L
  86,  87,  88,  89,  90,  91
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*Nset, nset=col-R
  1,  2,  3, 13, 14, 15
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*Elset, elset=col-R, generate
  1,  62,   1
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*Elset, elset=mid-p-1, generate
 113,  154,    1
*Nset, nset=mid-p-2
   2,   5, 333, 334, 335, 336
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*Elset, elset=mid-p-2, generate
 331,  353,    1
*Nset, nset=mid-p-3
   2,  11, 522, 523, 524, 525
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*Elset, elset=mid-p-3, generate
 526,  566,    1
*Nset, nset=col-L-U
   4,   5,  95,  96,  97,  98
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*Elset, elset=col-L-U, generate
  86,  112,    1
*Nset, nset=col-R-U
  2,  3, 47, 48, 49, 50
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*Elset, elset=col-R-U, generate
 36,  62,   1
*Nset, nset=col-L-D
   5,   8, 237, 238, 239, 240
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*Elset, elset=col-L-D, generate
 232,  266,    1
*Nset, nset=col-R-D
  1,  2, 13, 14, 15, 16
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*Elset, elset=col-R-D, generate
  1,  35,   1
** Section: col  Profile: COL
*Beam Section, elset=col-R-D, material=C40-e, temperature=GRADIENTS, section=CIRC
0.295
0.,0.,-1.
** Section: col  Profile: COL
*Beam Section, elset=col-R-U, material=C40-e, temperature=GRADIENTS, section=CIRC
0.295
0.,0.,-1.
** Section: top  Profile: TOP
*Beam Section, elset=top-p, material=C40-e, temperature=GRADIENTS, section=RECT
1., 0.7
0.,0.,-1.
** Section: col  Profile: COL
*Beam Section, elset=col-L-U, material=C40-e, temperature=GRADIENTS, section=CIRC
0.295
0.,0.,-1.
** Section: mid  Profile: MID
*Beam Section, elset=mid-p-1, material=C40-e, temperature=GRADIENTS, section=RECT
1., 0.35
0.,0.,-1.
** Section: side  Profile: SIDE
*Beam Section, elset=side-p-L, material=C40-e, temperature=GRADIENTS, section=RECT
1., 0.7
0.,0.,-1.
** Section: bot  Profile: BOT
*Beam Section, elset=bot-p, material=C40-e, temperature=GRADIENTS, section=RECT
1., 0.8
0.,0.,-1.
** Section: col  Profile: COL
*Beam Section, elset=col-L-D, material=C40-e, temperature=GRADIENTS, section=CIRC
0.295
0.,0.,-1.
** Section: mid  Profile: MID
*Beam Section, elset=mid-p-2, material=C40-e, temperature=GRADIENTS, section=RECT
1., 0.35
0.,0.,-1.
** Section: side  Profile: SIDE
*Beam Section, elset=side-p-R, material=C40-e, temperature=GRADIENTS, section=RECT
1., 0.7
0.,0.,-1.
** Section: mid  Profile: MID
*Beam Section, elset=mid-p-3, material=C40-e, temperature=GRADIENTS, section=RECT
1., 0.35
0.,0.,-1.
*End Part
**
**
** ASSEMBLY
**
*Assembly, name=Assembly
**
*Instance, name=site-1, part=site
*End Instance
**
*Instance, name=struc-1, part=struc
        64.4,         25.5,           0.
*End Instance
**
*Nset, nset=Set-5, instance=site-1, generate
    1,  4419,     1
*Elset, elset=Set-5, instance=site-1, generate
    1,  4230,     1
*Nset, nset=Set-6, instance=struc-1, generate
   1,  561,    1
*Elset, elset=Set-6, instance=struc-1, generate
   1,  566,    1
*Nset, nset=Set-7, instance=site-1, generate
    1,  4419,     1
*Elset, elset=Set-7, instance=site-1, generate
    1,  4230,     1
*Nset, nset=Set-8, instance=site-1
   11,   12,   14,   17,  265,  266
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*Elset, elset=Set-8, instance=site-1
  228,  240,  252,  264,  276,  288
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*Nset, nset=m_Set-3, instance=site-1
 34,
*Nset, nset=s_Set-3, instance=site-1
 4,
*Nset, nset=site-bot, instance=site-1
   11,   12,   14,   17,  265,  266
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*Elset, elset=site-bot, instance=site-1
  228,  240,  252,  264,  276,  288
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*Nset, nset=site-side, instance=site-1
    3,    4,    8,   12,   13,   16
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*Elset, elset=site-side, instance=site-1
  107,  108,  198,  853,  854,  855
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*Elset, elset=_m_Surf-1_SPOS, internal, instance=struc-1
  63,  64,  65,  66,  67,  68
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*Surface, type=ELEMENT, name=m_Surf-1
_m_Surf-1_SPOS, SPOS
*Elset, elset=_s_Surf-1_S2, internal, instance=site-1
  199,  200,  201,  202,  203,  204
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*Elset, elset=_s_Surf-1_S4, internal, instance=site-1
 2809, 2863, 2917, 2971, 3025, 3079
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*Surface, type=ELEMENT, name=s_Surf-1
_s_Surf-1_S2, S2
_s_Surf-1_S4, S4
** Constraint: Constraint-1
*Tie, name=Constraint-1, adjust=yes
s_Surf-1, m_Surf-1
*End Assembly
*Amplitude, name=Amp-1
             0.,    -1.07434e-06,            0.01,    -2.43607e-06,            0.02,     3.64176e-06,            0.03,     1.17769e-05
           0.04,     1.44262e-05,            0.05,    -8.23765e-06,            0.06,     -4.3579e-05,            0.07,    -6.64555e-05
           0.08,    -6.22477e-05,            0.09,    -7.27862e-05,             0.1,    -0.000122544,            0.11,      -0.0001265
           0.12,    -5.75063e-05,            0.13,     9.54237e-05,            0.14,     0.000204858,            0.15,     0.000169684
           0.16,    -2.05476e-05,            0.17,    -0.000206861,            0.18,    -0.000180991,            0.19,     5.35589e-05
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          39.96,    -0.000299621,           39.97,    -0.000211372,           39.98,    -0.000115397,           39.99,    -5.01437e-05
**
** MATERIALS
**
**<MATERIALS_BEGIN>
*Material, name=C40-e
*Density
2500.,
*Elastic
 3.25e+10, 0.2
*Material, name=soil-1
*Density
1700.,
*Elastic
 4.85537e+07, 0.29
*Material, name=soil-2
*Density
2020.,
*Elastic
 4.85537e+07, 0.31
*Material, name=soil-3
*Density
1930.,
*Elastic
 1.02987e+08, 0.29
*Material, name=soil-4
*Density
2020.,
*Elastic
 1.22242e+08, 0.31
*Material, name=soil-5
*Density
1960.,
*Elastic
 1.25458e+08, 0.29
*Material, name=soil-6
*Density
2080.,
*Elastic
 1.73724e+08, 0.31
*Material, name=soil-7
*Density
2020.,
*Elastic
 2.50286e+08, 0.26
*Material, name=soil-8
*Density
2020.,
*Elastic
 3.16768e+08, 0.26
**<MATERIALS_END>
*Material, name=steel
*Density
7800.,
*Elastic
 2e+11, 0.3
*Plastic
   4e+08,     0.
 5.4e+08, 0.0685
** ----------------------------------------------------------------
*PREPRINT, MODEL=YES, ECHO=YES, HISTORY=NO
**
** STEP: Step-1
**
*Step, name=Step-1, nlgeom=NO, inc=1000000000
*Static
0.01, 1., 1e-05, 0.01
**
** BOUNDARY CONDITIONS
**
** Name: BC-1 Type: 对称/反对称/完全固定
*Boundary
Set-8, ENCASTRE
**
** LOADS
**
** Name: Load-1   Type: Body force
*Dload
Set-7, BX, 30000.
**
** OUTPUT REQUESTS
**
*Restart, write, frequency=0
**
** FIELD OUTPUT: F-Output-1
**
*Output, field, time interval=0.1
*Node Output
CF, RF, U
*Element Output, directions=YES
LE, PE, PEEQ, PEMAG, S
**
** HISTORY OUTPUT: H-Output-1
**
*Output, history
*Energy Output, elset=Set-6, variable=PRESELECT
*End Step

*STEP, NAME=MATRIX
*MATRIX GENERATE, STIFFNESS, LOAD
*MATRIX OUTPUT, STIFFNESS,LOAD, FORMAT=MATRIX
*Boundary
Set-8, ENCASTRE
*LOAD CASE, NAME=LC1
*Dload
Set-7, BX, 30000.
*END LOAD CASE
*END STEP
